# Carte Contrôle & Mesure production

Dataset: openLCA process, unit process
Category: ESOS-Formation
Geography: FR

## Reference product
- Carte Contrôle & Mesure production: 1 unit

## Inputs
- market for integrated circuit, logic type: 6e-5, 0.0001 kg (2 entries)
- market for resistor, surface-mounted: 2e-5, 5e-6, 5e-6, 5e-6 kg (4 entries)
- market for capacitor, for surface-mounting: 1e-5, 1e-5 kg (2 entries)
- market for wafer, fabricated, for integrated circuit: 3.6e-5 m2
- market for liquid crystal display, unmounted: 0.001 kg
- market for printed wiring board, for surface mounting, Pb free surface: 0.002 m2
- market for mounting, surface mount technology, Pb-free solder: 0.002 m2
