# Carte Chargeur production

Dataset: openLCA process, unit process
Category: ESOS-Formation
Geography: FR

## Reference product
- Carte Chargeur production: 1 unit

## Inputs
- market for integrated circuit, logic type: 8e-5, 4e-5, 8e-5 kg (3 entries)
- market for inductor, low value multilayer chip: 3e-5 kg
- market for capacitor, for surface-mounting: 1e-5, 1e-5, 1e-5 kg (3 entries)
- market for resistor, surface-mounted: 5e-6, 5e-5 kg (2 entries)
- market for diode, glass-, for surface-mounting: 2e-5 kg
- market for electric connector, peripheral type buss: 0.0003 kg
- market for transistor, surface-mounted: 4e-5, 4e-5 kg (2 entries)
- market for electric connector, peripheral component interconnect buss: 0.0002 kg
- market for printed wiring board, for surface mounting, Pb free surface: 0.0012 m2
- market for mounting, surface mount technology, Pb-free solder: 0.0012 m2

# Carte Contrôle & Mesure production

Dataset: openLCA process, unit process
Category: ESOS-Formation
Geography: FR

## Reference product
- Carte Contrôle & Mesure production: 1 unit

## Inputs
- market for integrated circuit, logic type: 6e-5, 0.0001 kg (2 entries)
- market for resistor, surface-mounted: 2e-5, 5e-6, 5e-6, 5e-6 kg (4 entries)
- market for capacitor, for surface-mounting: 1e-5, 1e-5 kg (2 entries)
- market for wafer, fabricated, for integrated circuit: 3.6e-5 m2
- market for liquid crystal display, unmounted: 0.001 kg
- market for printed wiring board, for surface mounting, Pb free surface: 0.002 m2
- market for mounting, surface mount technology, Pb-free solder: 0.002 m2

# PCB et Assemblage production

Dataset: openLCA process, unit process
Category: ESOS-Formation
Geography: GLO

## Reference product
- PCB et Assemblage production: 1 unit

## Inputs
- market for printed wiring board, for surface mounting, Pb free surface: 0.0012, 0.002 m2 (2 entries)
- market for mounting, surface mount technology, Pb-free solder: 5e-5, 2e-5 kg (2 entries)
- market for electric connector, peripheral component interconnect buss: 0.0004 kg
- market for cable, ribbon cable, 20-pin, with plugs: 0.002 kg

# Chargeur de Batteries Li-ion/LiPo

Dataset: openLCA process, unit process
Category: ESOS-Formation
Geography: FR

## Reference product
- Chargeur de Batteries Li-ion/LiPo: 1 unit

## Inputs
- Carte Chargeur production: 1 unit
- Carte Contrôle & Mesure production: 1 unit
- PCB et Assemblage production: 1 unit
